# OpenSim document version 40000
Model Modelo_vacio:
  gravity: 0 -9.80665 0
  credits: Author: Jaime Vélez, 2022.
  length_units: meters
  force_units: N
  Ground Tierra: meshes=(block.vtp checkered_floor.vtp)
  # Descripción del modelo: Modelo vacío para el estudio del proceso de creación de nuevas simulaciones desde cero. Jaime Vélez, 2022.
  BodySet: mass=2 inertia=(0.133333 0.133333 0.133333 0 0 0)
    Body block: mass=20 [kg] mass_center=(0 0 0) inertia=(0.133333 0.133333 0.133333 0 0 0) meshes=block.vtp
  JointSet:
    SliderJoint ground_block: socket_parent_frame=ground_offset socket_child_frame=block_offset
      Coordinate block_tz: default_value=0 range=(-0.3 0.3) clamped=true
      PhysicalOffsetFrame ground_offset: socket_parent=/ground translation=(0 0 0) [meters]
          orientation=(0 -1.5708 0) [radians]
      PhysicalOffsetFrame block_offset: socket_parent=/bodyset/block translation=(0 -0.05 0) orientation=(0 -1.5708 0)
    PinJoint articulacion: parent_body=block2 location_in_parent=(0 0.5 0) location=(0 0 0)
      Coordinate bloque2_rot: motion_type=rotational default_value=0 range=(-3.14 3.14) clamped=false
  ForceSet:
    Thelen2003Muscle muscle1: optimal_force=1 max_isometric_force=1000 optimal_fiber_length=0.1 tendon_slack_length=0.2
        pennation_angle_at_optimal=0 [radians] default_activation=1 default_fiber_length=0.25
      PathPoint point1: ground (0 0.05 -0.35)
      PathPoint point2: block (0 0 -0.05)
    Thelen2003Muscle muscle2: optimal_force=1 max_isometric_force=1000 optimal_fiber_length=0.1 tendon_slack_length=0.2
        pennation_angle_at_optimal=0 default_activation=0.05 default_fiber_length=0.25
      PathPoint point1: ground (0 0.05 0.35)
      PathPoint point2: block (0 0 0.05)
