# OpenSim document version 30000
Model Tug_of_War_Millard_ISO:
  credits: Author: Jaime Vélez
  length_units: meters
  force_units: N
  gravity: 0 -9.80665 0
  BodySet:
    Body ground: mass=0 mass_center=(0 0 0) inertia_xx=0 inertia_yy=0 inertia_zz=0
        meshes=(checkered_floor.vtp block.vtp)
    Body block: mass=20 mass_center=(0 0 0) inertia_xx=0.1333333 inertia_yy=0.1333333 inertia_zz=0.1333333
        meshes=block.vtp
      SliderJoint ground_block: parent_body=ground location_in_parent=(0 0 0) orientation_in_parent=(0 -1.570796 0)
          location=(0 -0.05 0) orientation=(0 -1.570796 0)
        Coordinate block_tz: motion_type=translational default_value=0 range=(-0.3 0.3) clamped=true
  ForceSet:
    Millard2012EquilibriumMuscle LeftMuscle: min_control=0 max_control=1 optimal_force=1 max_isometric_force=1000
        optimal_fiber_length=0.1 tendon_slack_length=0.2 pennation_angle_at_optimal=0 [radians]
        max_contraction_velocity=10 default_activation=0.01 default_fiber_length=0.1
        activation_time_constant=0.01 [seconds] deactivation_time_constant=0.04 [seconds]
      PathPoint muscle2-point1: ground (0 0.05 0.35)
      PathPoint muscle2-point2: block (0 0 0.05)
      ActiveForceLengthCurve: min_norm_active_fiber_length=0.4441 transition_norm_fiber_length=0.6259
          max_norm_active_fiber_length=1.8123 shallow_ascending_slope=0.8616 minimum_value=0
      ForceVelocityInverseCurve: min_concentric_slope=0.1 isometric_slope=5 min_eccentric_slope=0.1
          max_eccentric_velocity_force_multiplier=1.4 concentric_curviness=0.5 eccentric_curviness=0.9
      FiberForceLengthCurve: strain_at_zero_force=0 strain_at_one_norm_force=0.6
      TendonForceLengthCurve: strain_at_one_norm_force=0.049
